// COMSOL Multiphysics 6.2.0.290 model "acoustic2d_room_2d.mph"
// Outline of the model tree

Parameters
  c0 = 343[m/s]
  rho0 = 1.225[kg/m^3]
  freq0 = 3000[Hz]
  k0 = 2*pi*freq0/c0

Geometry
  geom1 "Geometry 1" (2D, length unit m)
    r1: Rectangle | base = center; size = {1.0, 1.5}
    c1: Circle | r = 0.1
    fin: Finalize "Form Union"

Materials
  mat1: Common "air" on domains 1, 2
    def "Basic"
      density = rho0
      soundspeed = c0
  mat2: Common "copper" on domains 2
    def "Basic"
      density = 8960
      soundspeed = 4760

Physics
  acpr: PressureAcoustics "Pressure Acoustics, Frequency Domain" on all domains
    dependent variable p
    fpam1: FrequencyPressureAcousticsModel "Pressure Acoustics 1" (default)
    shb1: SoundHard "Sound Hard Boundary (Wall) 1" (default)
    init1: init "Initial Values 1" (default)
    pwr1: PlaneWaveRadiation on boundaries 1
      ipf1: IncidentPressureField on all boundaries | pamp = exp(-y^2/2/(0.2[m])^2); c = c0
    pwr2: PlaneWaveRadiation on boundaries 2-4

Mesh
  mesh1 "Mesh 1"
    size: MeshSizeDefault | custom = on
    ftri1: FreeTri "Free Triangular 1" on remaining entities | smoothmaxiter = 4; smoothmaxdepth = 4
      size1: Size on entire geometry | hmax = 0.03; custom = on

Studies
  std1 "Study 1"
    freq: Frequency "Frequency Domain" | plist = freq0

Solver configurations
  sol1 "Solution 1" (study std1)
    v1: Variables "Dependent Variables 1"
    s1: Stationary "Stationary Solver 1" | linpmethod = sol
      dDef: Direct
      p1: Parametric | pname = freq; plistarr = freq0; punit = Hz; pcontinuationmode = no
      fc1: FullyCoupled | linsolver = dDef

Datasets
  dset1: Solution | solution = sol1

Plots
  pg1: PlotGroup2D "Acoustic Pressure (acpr)" | data = dset1
    surf1: Surface | expr = abs(acpr.p_t)
  pg2: PlotGroup2D "Sound Pressure Level (acpr)" | data = dset1
    surf1: Surface | expr = acpr.Lp_t