// COMSOL Multiphysics 6.2.0.290 model "SRR_tr_unit1_v62.mph"
// Outline of the model tree

Parameters
  eps0 = epsilon0_const
  mu0 = mu0_const
  c = 1/sqrt(eps0*mu0)
  eta0 = sqrt(mu0/eps0)
  freq0 = 7[GHz]
  omega0 = 2*pi*freq0
  lambda0 = c/freq0
  k0 = 2*pi/lambda0
  a1 = 5.25[mm]
  a2 = a1
  a3 = a1
  V = a1*a2*a3
  tmetal = 0.25[mm]
  wmetal = 0.25[mm]
  wring = 3.75[mm]
  wring2 = 3[mm]
  gapsize = 0.125[mm]
  epsCu0 = -1000-1e8*i
  sigmaCu = 5.8e7[S/m]
  meshsize = 2[mm]
  epsCu = 1-i*sigmaCu/omega0/eps0

Selections
  emw_dst_pc2: Explicit on boundaries 5, 18, 65
  emw_dst_pc3: Explicit on boundaries 4, 9, 13, 17, 62

Geometry
  geom1 "Geometry 1" (3D, length unit m)
    blk1: Block | base = center; size = {a1, a2, a3}
    blk2: Block | base = center; size = {a1, tmetal, a3}
    blk3: Block | base = center; size = {wring, tmetal, wring}
    blk4: Block | base = center; size = {wring-2*wmetal, tmetal, wring-2*wmetal}
    blk5: Block | base = center; size = {wring2, tmetal, wring2}
    blk6: Block | base = center; size = {wring2-2*wmetal, tmetal, wring2-2*wmetal}
    blk7: Block | pos = {0, 0, wring/2-wmetal/2}; base = center; size = {gapsize, tmetal, wmetal}
    blk8: Block | pos = {0, 0, -wring2/2+wmetal/2}; base = center; size = {gapsize, tmetal, wmetal}
    blk9: Block | base = center; size = {3*a1, a2, a3}
    fin: Finalize "Form Union"

Materials
  mat1: Common "Material 1" on domains 1-4, 6, 8-11
    def "Basic"
      relpermittivity = 1
      relpermeability = 1
      electricconductivity = 0
  mat2: Common "Material 2" on domains 5, 7
    def "Basic"
      relpermittivity = epsCu
      relpermeability = 1
      electricconductivity = 0

Physics
  emw: ElectromagneticWaves "Electromagnetic Waves, Frequency Domain" on all domains
    dependent variable E = {Ex, Ey, Ez}
    BackgroundField.SolveFor = fullField
    BackgroundField.Eb = {Exin, Eyin, Ezin}
    wee1: WaveEquationElectric (default)
    pec1: PerfectElectricConductor (default)
    init1: init "Initial Values 1" (default)
    pc2: PeriodicCondition on boundaries 2, 5, 7, 18, 60, 65 | destinationDomains: boundaries 5, 18, 65
    pc3: PeriodicCondition on boundaries 3, 4, 8, 9, 12, 13, 16, 17, 61, 62
      destinationDomains: boundaries 4, 9, 13, 17, 62
    port1: Port on boundaries 1 | PortType = Periodic; E0 = {0, 0, 1}; Eampl = {0, 0, 1}
    port2: Port on boundaries 66 | PortExcitation = off; PortType = Periodic; E0 = {0, 0, 1}; Eampl = {0, 0, 1}

Mesh
  mesh1 "Mesh 1"
    size: MeshSizeDefault | hmax = meshsize; custom = on
    edg1: Edge on edges 9-11, 15, 20
      size1: Size on edges 9-11, 15, 20 | hmax = meshsize; custom = on
    cpe1: CopyEdge | source = edges 9; destination = edges 24, 107
    cpe2: CopyEdge | source = edges 11; destination = edges 13, 25
    cpe3: CopyEdge | source = edges 10; destination = edges 12, 108
    cpe4: CopyEdge | source = edges 15; destination = edges 17, 113
    cpe5: CopyEdge | source = edges 20; destination = edges 22, 116
    ftri1: FreeTri "Free Triangular 1" on boundaries 6-8, 10, 12, 14, 16
      size1: Size on boundaries 6-8, 10, 12, 14, 16 | hmax = meshsize; custom = on
    cpf1: CopyFace | source = boundaries 6, 10, 14; destination = boundaries 59, 63, 64
    cpf2: CopyFace | source = boundaries 7; destination = boundaries 18
    cpf3: CopyFace | source = boundaries 8, 12, 16; destination = boundaries 9, 13, 17
    cpe6: CopyEdge | source = edges 11; destination = edges 3, 5, 7, 109, 111, 119
    ftri2: FreeTri "Free Triangular 2" on boundaries 2, 3, 60, 61
      size1: Size on entire geometry | hmax = meshsize; custom = on
    cpf4: CopyFace | source = boundaries 3; destination = boundaries 4
    cpf5: CopyFace | source = boundaries 61; destination = boundaries 62
    cpf6: CopyFace | source = boundaries 2; destination = boundaries 5
    cpf7: CopyFace | source = boundaries 60; destination = boundaries 65
    ftet1: FreeTet "Free Tetrahedral 1" on remaining entities
      size1: Size on entire geometry | hmax = meshsize; custom = on

Studies
  std1 "Study 1"
    param: Parametric "Parametric Sweep" | pname = freq0; plistarr = range(5.00[GHz],0.25[GHz],7.00[GHz]); punit = Hz
    freq: Frequency "Frequency Domain" | punit = Hz; plist = freq0

Solver configurations
  sol1 "Solution 1" (study std1)
    v1: Variables "Dependent Variables 1"
    s1: Stationary "Stationary Solver 1" | stol = 0.01; linpmethod = sol
      p1: Parametric | pname = freq; plistarr = freq0; punit = Hz; pcontinuationmode = no
      fc1: FullyCoupled | linsolver = d1
      d1: Direct "Suggested Direct Solver (emw)"
  sol2 "Parametric Solutions 1" (study std1)

Datasets
  dset1: Solution | solution = sol1
  dset2: Solution | solution = sol2

Derived values
  gev1: EvalGlobal "Global Evaluation 1" | data = dset2; table = tbl1; expr = {real(tf), imag(tf), real(rf), imag(rf)}

Tables
  tbl1: Table
    // Global Evaluation 1
    freq0 (Hz) | freq (Hz) | real(tf) (1) | imag(tf) (1) | real(rf) (1) | imag(rf) (1)
    5e+09 | 5e+09 | 0.692673 | -0.717604 | -0.0486448 | -0.0480042
    5.01e+09 | 5.01e+09 | 0.690686 | -0.719617 | -0.0479589 | -0.0470889
    5.02e+09 | 5.02e+09 | 0.688672 | -0.721645 | -0.0472487 | -0.0461567
    5.03e+09 | 5.03e+09 | 0.686632 | -0.723688 | -0.0465131 | -0.0452073
    5.04e+09 | 5.04e+09 | 0.684563 | -0.725746 | -0.0457515 | -0.0442402
    5.05e+09 | 5.05e+09 | 0.682466 | -0.727819 | -0.0449629 | -0.0432551
    5.06e+09 | 5.06e+09 | 0.68034 | -0.729909 | -0.0441465 | -0.0422517
    5.07e+09 | 5.07e+09 | 0.678182 | -0.732016 | -0.0433013 | -0.0412295
    5.08e+09 | 5.08e+09 | 0.675994 | -0.734139 | -0.0424264 | -0.0401883
    5.09e+09 | 5.09e+09 | 0.673773 | -0.736279 | -0.0415208 | -0.0391277
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
Plots
  pg1: PlotGroup3D "Electric Field (emw)" | data = dset2
    mslc1: Multislice | expr = emw.normE
  pg2: PlotGroup3D "Electric Field (emw) 1" | data = dset1
    mslc1: Multislice | expr = emw.normE
  pg3: PlotGroup1D "1D Plot Group 3" | data = dset1
    glob1: Global | data = dset2; expr = {abs(emw.S21)^2, abs(emw.S11)^2, abs(emw.S21)^2+abs(emw.S11)^2}; unit = {1, 1, 1}